# By: Guy Soffer
# Rotation Matrix | Translation Matrix | Offset Matrix | Test Vector
R := [r_11, r_12, 0; r_21, r_22, 0; 0, 0, 1]
T := [1, 0, t_x; 0, 1, t_y; 0, 0, 1]
T_ofs := [1, 0, -t_x; 0, 1, -t_y; 0, 0, 1]
V := [x; y; 1]
# Rotate a vector 2x2
R*V → [r_11*x + r_12*y; r_21*x + r_22*y; 1]
# Translate a vector 2x2
T*V → [t_x + x; t_y + y; 1]
# Rotate than translate
T*R → [r_11, r_12, t_x; r_21, r_22, t_y; 0, 0, 1]
# Translate than rotate
R*T → [r_11, r_12, r_11*t_x + r_12*t_y; r_21, r_22, r_21*t_x + r_22*t_y; 0, 0, 1]
# Translate than rotate than translate (rotate around the origin (t_x, t_y)
T*R*T_ofs → [r_11, r_12, t_x - r_11*t_x - r_12*t_y; r_21, r_22, t_y - r_21*t_x - r_22*t_y; 0, 0, 1]
# Rotation Matrix | Translation Matrix | Offset Matrix | Test Vector
R := [r_11, r_12, r_13, 0; r_21, r_22, r_23, 0; r_31, r_32, r_33, 0; 0, 0, 0, 1]
T := [1, 0, 0, t_x; 0, 1, 0, t_y; 0, 0, 1, t_z; 0, 0, 0, 1]
T_ofs := [1, 0, 0, -t_x; 0, 1, 0, -t_y; 0, 0, 1, -t_z; 0, 0, 0, 1]
V := [x; y; z; 1]
# Rotate a vector 2x2
R*V → [r_11*x + r_12*y + r_13*z; r_21*x + r_22*y + r_23*z; r_31*x + r_32*y + r_33*z; 1]
# Translate a vector 2x2
T*V → [t_x + x; t_y + y; t_z + z; 1]
# Rotate than translate
T*R → [r_11, r_12, r_13, t_x; r_21, r_22, r_23, t_y; r_31, r_32, r_33, t_z; 0, 0, 0, 1]
# Translate than rotate
R*T → [
    r_11, r_12, r_13, r_11*t_x + r_12*t_y + r_13*t_z;
    r_21, r_22, r_23, r_21*t_x + r_22*t_y + r_23*t_z;
    r_31, r_32, r_33, r_31*t_x + r_32*t_y + r_33*t_z;
    0, 0, 0, 1
]
# Translate than rotate than translate (rotate around the origin (t_x, t_y)
T*R*T_ofs → [
    r_11, r_12, r_13, t_x - r_11*t_x - r_12*t_y - r_13*t_z;
    r_21, r_22, r_23, t_y - r_21*t_x - r_22*t_y - r_23*t_z;
    r_31, r_32, r_33, t_z - r_31*t_x - r_32*t_y - r_33*t_z;
    0, 0, 0, 1
]
